Rp := 100 kΩ
RA := 100 Ω
C := 4.7 μF
Rf := 1.5 kΩ
Rb := 1 MΩ
Rb2 := Rp + Rf
RB := Rb*Rb2/(Rb + Rb2) = 92.1471 kΩ
(5 V)^2/(250 mW) = 100 Ω
T := 0.693*(RA + 2*RB)*C = 0.60059 s
f := 1/T = 1.66503 Hz
D := RB/(RA + 2*RB) = 0.499729
clear(RA, Rb, Rp, Rf, Rb2, RB, C, T, D, f)
Rp := 0 Ω
RA := 100 Ω
C := 4.7 μF
Rf := 1.5 kΩ
Rb := 1 MΩ
Rb2 := Rp + Rf
RB := Rb*Rb2/(Rb + Rb2) = 1.49775 kΩ
T := 0.693*(RA + 2*RB)*C = 0.0100824 s
f := 1/T = 99.183 Hz
D := RB/(RA + 2*RB) = 0.483848
C := 1/(100 Hz*0.693*(RA + 2*RB)) = 4.6616 μF
clear(RA, Rb, Rp, Rf, Rb2, RB, C, T, D, f)
RA := 100 Ω
C := 4.7 μF
Rb := 1 MΩ
Rf := 1.5 kΩ
Rp := ((Rb + Rf)*(1/(2*0.693*C*1 Hz) - RA) - Rb*Rf)/(Rb + RA - 1/(2*0.693*C*1 Hz)) = 179.71 kΩ
